/* INPUTVARIABLES.ANY
Variables and parameters to modify at each simulation.
*/

AnyFolder InputVariables = {

  /* -- FILES/FOLDERS NAMES --
  Names of files to load or save in the Output folder
  m_ResultFile :   Name for results file (saved as .txt or .h5)
  m_LoadFile : Name for the result file to load (.h5)
  m_ResultFolder : Name for folder results. !!Must be created on computer before!!
      WARNING:    Be sure that the m_ResultFolder variable refers to an existing folder on your computer !!
  ----------------------------- */


  //Code test--------------

  // Name of the .h5 data to save (with the SaveResultsh5 operation)
  #define m_ResultFile "Results_21-02_version_neutre"
  #define m_ResultFolder "SaveData/test/"
  #define m_LoadFile "Results_FDK_sans_correction_version_neutre"

  //--------------------


  /*
  //------------------------Vrai code
  // Name of the .h5 data to save (with the SaveResultsh5 operation)
  #define m_ResultFile "Results_14_02_2023_version_neutre"
  #define m_ResultFolder "SaveData/"


  // Name of the .h5 data to load (with the LoadAndReplay operation)
  // LoadAndReplay : Operation to load and replay a previous .h5 result file
  #define m_LoadFile "Results_13_02_2023_version_neutre"
  //--------------------------------
*/


  /* -------- IMPLANTS --------
  NAMES AND POSITIONS: Managed in an axternal file:
      - To create based on the #include "InputImplantJoint_ImplantName.any" template
      - To place in the "Input" Folder
  ----------------------------- */
  //#include "InputImplantJoint_CeraverT351.any"
  #define INPUTPOS "CeraverT351_version_neutre"


  /* ----- SPECIFIC PATIENT -----
    0 AnyBody Model
    1 Ct-scans scale
    2 External landmarks scale:
        - Create and fill custom file based on the "Mesures_PatientName.any" file ; Rename it with a custom PatientName
        - Replace the "MEASURE" variable by your custom PatientName.
  ----------------------------- */
  #define scale 0
  // To replace by the same name as filename ("Scaling/Mesures_PatientName.any")
  #if scale == 2
    #define SUBJECT "PatientName"
  #endif


  //camera differentes supprimees
  /* --------- CAMERA ---------
    Camera == 1 : Activate auto save by camera
    Vue == 1 : Global view, 45deg scapula
    Vue == 2 : Fixed view, face to glenoid
  ----------------------------- */
//  #define Camera 0
  #define Vue 1
};
